*Heading
** Simplified moving heat source plate model for frontend temperature-field linkage.
** This uses placeholder thermal parameters and is not a validated grinding temperature model.
*Preprint, echo=NO, model=NO, history=NO, contact=NO
*Node
1, -50.000000, -50.000000, 0.000000
2, -47.500000, -50.000000, 0.000000
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*Element, type=DC3D8
1, 1, 2, 43, 42, 1682, 1683, 1724, 1723
2, 2, 3, 44, 43, 1683, 1684, 1725, 1724
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*Nset, nset=ALL_NODES
1, 2, 3, 4, 5, 6
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*Nset, nset=BOTTOM_NODES
1, 2, 3, 4, 5, 6
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*Elset, elset=PLATE_ELEMENTS, generate
1, 3200, 1
*Nset, nset=HOT_01
4021, 4022, 4023, 4024, 4025, 4061
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*Nset, nset=HOT_02
4023, 4024, 4025, 4026, 4027, 4063
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*Nset, nset=HOT_03
4025, 4026, 4027, 4028, 4029, 4065
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*Nset, nset=HOT_04
4027, 4028, 4029, 4030, 4031, 4067
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*Nset, nset=HOT_05
4029, 4030, 4031, 4032, 4033, 4069
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*Nset, nset=HOT_06
4031, 4032, 4033, 4034, 4035, 4071
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*Nset, nset=HOT_07
4033, 4034, 4035, 4036, 4037, 4073
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*Nset, nset=HOT_08
4035, 4036, 4037, 4038, 4039, 4075
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*Nset, nset=HOT_09
4037, 4038, 4039, 4040, 4041, 4077
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*Nset, nset=HOT_10
4039, 4040, 4041, 4042, 4043, 4079
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*Nset, nset=HOT_11
4041, 4042, 4043, 4044, 4045, 4081
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*Nset, nset=HOT_12
4043, 4044, 4045, 4046, 4047, 4083
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*Nset, nset=HOT_13
4045, 4046, 4047, 4048, 4049, 4085
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*Nset, nset=HOT_14
4047, 4048, 4049, 4050, 4051, 4087
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*Nset, nset=HOT_15
4049, 4050, 4051, 4052, 4053, 4089
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*Nset, nset=HOT_16
4051, 4052, 4053, 4054, 4055, 4091
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*Nset, nset=HOT_17
4053, 4054, 4055, 4056, 4057, 4093
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*Solid Section, elset=PLATE_ELEMENTS, material=PLACEHOLDER_STEEL
*Material, name=PLACEHOLDER_STEEL
** Placeholder values in mm-s-degC style units.
*Conductivity
0.045
*Density
7.85e-06
*Specific Heat
460.
*Initial Conditions, type=TEMPERATURE
ALL_NODES, 26.000000
*Step, name=HEAT_01, nlgeom=NO
*Heat Transfer
0.250000, 0.250000, 1e-05, 0.250000
*Boundary, OP=NEW
BOTTOM_NODES, 11, 11, 26.000000
HOT_01, 11, 11, 92.000000
*Output, field, frequency=1
*Node Output
NT
*End Step
*Step, name=HEAT_02, nlgeom=NO
*Heat Transfer
0.250000, 0.250000, 1e-05, 0.250000
*Boundary, OP=NEW
BOTTOM_NODES, 11, 11, 26.000000
HOT_02, 11, 11, 92.000000
*Output, field, frequency=1
*Node Output
NT
*End Step
*Step, name=HEAT_03, nlgeom=NO
*Heat Transfer
0.250000, 0.250000, 1e-05, 0.250000
*Boundary, OP=NEW
BOTTOM_NODES, 11, 11, 26.000000
HOT_03, 11, 11, 92.000000
*Output, field, frequency=1
*Node Output
NT
*End Step
*Step, name=HEAT_04, nlgeom=NO
*Heat Transfer
0.250000, 0.250000, 1e-05, 0.250000
*Boundary, OP=NEW
BOTTOM_NODES, 11, 11, 26.000000
HOT_04, 11, 11, 92.000000
*Output, field, frequency=1
*Node Output
NT
*End Step
*Step, name=HEAT_05, nlgeom=NO
*Heat Transfer
0.250000, 0.250000, 1e-05, 0.250000
*Boundary, OP=NEW
BOTTOM_NODES, 11, 11, 26.000000
HOT_05, 11, 11, 92.000000
*Output, field, frequency=1
*Node Output
NT
*End Step
*Step, name=HEAT_06, nlgeom=NO
*Heat Transfer
0.250000, 0.250000, 1e-05, 0.250000
*Boundary, OP=NEW
BOTTOM_NODES, 11, 11, 26.000000
HOT_06, 11, 11, 92.000000
*Output, field, frequency=1
*Node Output
NT
*End Step
*Step, name=HEAT_07, nlgeom=NO
*Heat Transfer
0.250000, 0.250000, 1e-05, 0.250000
*Boundary, OP=NEW
BOTTOM_NODES, 11, 11, 26.000000
HOT_07, 11, 11, 92.000000
*Output, field, frequency=1
*Node Output
NT
*End Step
*Step, name=HEAT_08, nlgeom=NO
*Heat Transfer
0.250000, 0.250000, 1e-05, 0.250000
*Boundary, OP=NEW
BOTTOM_NODES, 11, 11, 26.000000
HOT_08, 11, 11, 92.000000
*Output, field, frequency=1
*Node Output
NT
*End Step
*Step, name=HEAT_09, nlgeom=NO
*Heat Transfer
0.250000, 0.250000, 1e-05, 0.250000
*Boundary, OP=NEW
BOTTOM_NODES, 11, 11, 26.000000
HOT_09, 11, 11, 92.000000
*Output, field, frequency=1
*Node Output
NT
*End Step
*Step, name=HEAT_10, nlgeom=NO
*Heat Transfer
0.250000, 0.250000, 1e-05, 0.250000
*Boundary, OP=NEW
BOTTOM_NODES, 11, 11, 26.000000
HOT_10, 11, 11, 92.000000
*Output, field, frequency=1
*Node Output
NT
*End Step
*Step, name=HEAT_11, nlgeom=NO
*Heat Transfer
0.250000, 0.250000, 1e-05, 0.250000
*Boundary, OP=NEW
BOTTOM_NODES, 11, 11, 26.000000
HOT_11, 11, 11, 92.000000
*Output, field, frequency=1
*Node Output
NT
*End Step
*Step, name=HEAT_12, nlgeom=NO
*Heat Transfer
0.250000, 0.250000, 1e-05, 0.250000
*Boundary, OP=NEW
BOTTOM_NODES, 11, 11, 26.000000
HOT_12, 11, 11, 92.000000
*Output, field, frequency=1
*Node Output
NT
*End Step
*Step, name=HEAT_13, nlgeom=NO
*Heat Transfer
0.250000, 0.250000, 1e-05, 0.250000
*Boundary, OP=NEW
BOTTOM_NODES, 11, 11, 26.000000
HOT_13, 11, 11, 92.000000
*Output, field, frequency=1
*Node Output
NT
*End Step
*Step, name=HEAT_14, nlgeom=NO
*Heat Transfer
0.250000, 0.250000, 1e-05, 0.250000
*Boundary, OP=NEW
BOTTOM_NODES, 11, 11, 26.000000
HOT_14, 11, 11, 92.000000
*Output, field, frequency=1
*Node Output
NT
*End Step
*Step, name=HEAT_15, nlgeom=NO
*Heat Transfer
0.250000, 0.250000, 1e-05, 0.250000
*Boundary, OP=NEW
BOTTOM_NODES, 11, 11, 26.000000
HOT_15, 11, 11, 92.000000
*Output, field, frequency=1
*Node Output
NT
*End Step
*Step, name=HEAT_16, nlgeom=NO
*Heat Transfer
0.250000, 0.250000, 1e-05, 0.250000
*Boundary, OP=NEW
BOTTOM_NODES, 11, 11, 26.000000
HOT_16, 11, 11, 92.000000
*Output, field, frequency=1
*Node Output
NT
*End Step
*Step, name=HEAT_17, nlgeom=NO
*Heat Transfer
0.250000, 0.250000, 1e-05, 0.250000
*Boundary, OP=NEW
BOTTOM_NODES, 11, 11, 26.000000
HOT_17, 11, 11, 92.000000
*Output, field, frequency=1
*Node Output
NT
*End Step
