*Heading
** Simplified plate for frontend color mapping prototype.
** This is not a real grinding contact model.
*Preprint, echo=NO, model=NO, history=NO, contact=NO
*Node
1, -2.000000, -1.000000, 0.000000
2, -1.200000, -1.000000, 0.000000
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*Element, type=C3D8R
1, 1, 2, 8, 7, 25, 26, 32, 31
2, 2, 3, 9, 8, 26, 27, 33, 32
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*Nset, nset=FIXED
1, 7, 13, 19, 25, 31, 37, 43
*Nset, nset=PULLED
6, 12, 18, 24, 30, 36, 42, 48
*Elset, elset=PLATE_ELEMENTS, generate
1, 15, 1
*Solid Section, elset=PLATE_ELEMENTS, material=STEEL
*Material, name=STEEL
*Elastic
210000., 0.30
*Step, name=STATIC_PULL, nlgeom=NO
*Static
0.1, 1.0, 1e-05, 0.1
*Boundary
FIXED, 1, 3, 0.0
PULLED, 1, 1, 0.02
*Output, field
*Element Output
S
*Node Output
U
*End Step
